#inicializacion
units        	metal
boundary    	p p p
#atom_style   	atomic

#read data
atom_style charge

atom_modify     map yes

box		tilt large
# geometry
#read_data	relax.dat
read_data POSCAR.lammps
#maybe remap the box to reduce tilt factors
#change_box all triclinic remap

#mass		*   12.0107

#interatomic potential
#pair_style       hybrid/overlay coul/cut 10 chimesFF #this was a test to check
#pair_coeff      * *  coul/cut 10     # the chimes+hybrid potential
#pair_coeff      * * chimesFF params.txt  # not use now.
pair_style      chimesFF
pair_coeff      * * params.txt

#pair_style      airebo 3.0 0 0
#pair_coeff 	* * CH.airebo C


thermo_style	custom step cella cellb cellc cellalpha cellbeta cellgamma etotal


variable        natoms equal count(all)
#replicate the unit cell to make better phonon dispersion relations.

#relax the structure
#fix     	RELAX all box/relax tri 0.0 vmax 0.0001 fixedpoint 0 0 0 #not necesary unless using a supercell...
#minimize 	1.0e-50 1.0e-50 10000000 10000000
#too big calculation reduce a bit...
minimize 	1.0e-5 1.0e-5 10000 100000
unfix   	RELAX
write_data relax.dat

#calculate the dinamical matrixes:
replicate	2 2 2

group           core    id 1:${natoms}

print 'calculating dynmat'
dynamical_matrix core eskm 1e-2 file Dyn.form binary no

print 'calculating third_order'
third_order     core eskm 5e-2 file THIRD binary no
